Wed Mar 26 16:33:08 CET 2014
$PROBLEM    PK model
$INPUT      ID TIME DV AMT WT
$DATA       outA.tab IGNORE=@
$SUBROUTINE ADVAN1 TRANS2
$PK

 TVCL  = THETA(1) * EXP(ETA(1))
 TVV   = THETA(2) * EXP(ETA(2))
 EMAX  = THETA(3)
 E50   = THETA(4)
 HL    = THETA(5)

 CL    = TVCL+((EMAX*WT**HL)/(E50**HL+WT**HL))
 V     = TVV *(WT/70)

 SC    = V

$ERROR
 IPRED = F
 Y= IPRED*(1+EPS(1))+EPS(2)

;$SIM (1000) ONLYSIM NSUBPROBLEM=1
;$TABLE ID TIME DV AMT FILE=outA.tab NOAPPEND NOPRINT NOHEADER
$THETA  (0,1,100) ; TVCL
 (0,20,100) ; TVV
 (0,2,100) ; EMAX
 (0,25,1000) ; E50
 (0,5,20) ; HL
$OMEGA  0.05
 0.05
$SIGMA  0.015
 0.0015
$ESTIMATION METHOD=1 INTER MAXEVAL=9999 SIG=3 PRINT=5 NOABORT POSTHOC
$COVARIANCE MATRIX=S UNCONDITIONAL

NM-TRAN MESSAGES
 WARNINGS AND ERRORS (IF ANY) FOR PROBLEM    1
 (WARNING  2) NM-TRAN INFERS THAT THE DATA ARE POPULATION.

1NONLINEAR MIXED EFFECTS MODEL PROGRAM (NONMEM) VERSION 7.3.0
 ORIGINALLY DEVELOPED BY STUART BEAL, LEWIS SHEINER, AND ALISON BOECKMANN
 CURRENT DEVELOPERS ARE ROBERT BAUER, ICON DEVELOPMENT SOLUTIONS,
 AND ALISON BOECKMANN. IMPLEMENTATION, EFFICIENCY, AND STANDARDIZATION
 PERFORMED BY NOUS INFOSYSTEMS.
 PROBLEM NO.:         1
 PK model
 TOT. NO. OF OBS RECS:      770
 TOT. NO. OF INDIVIDUALS:    110
 ONE COMPARTMENT MODEL (ADVAN1)
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 #TBLN:      1
 #METH: First Order Conditional Estimation with Interaction
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
 #TERM:
0MINIMIZATION TERMINATED
 DUE TO ROUNDING ERRORS (ERROR=134)
 NO. OF FUNCTION EVALUATIONS USED:      606
 NO. OF SIG. DIGITS IN FINAL EST.:  2.9

 ETABAR IS THE ARITHMETIC MEAN OF THE ETA-ESTIMATES,
 AND THE P-VALUE IS GIVEN FOR THE NULL HYPOTHESIS THAT THE TRUE MEAN IS 0.

 ETABAR:         4.2381E-03  7.7260E-04
 SE:             1.9708E-02  2.3442E-02
 N:                     110         110

 P VAL.:         8.2973E-01  9.7371E-01

 ETAshrink(%):   2.0242E+01  3.9682E+00
 EBVshrink(%):   2.0341E+01  4.1411E+00
 EPSshrink(%):   1.1234E+01  1.1234E+01

 #TERE:
 Elapsed estimation time in seconds:     4.23
 Elapsed covariance time in seconds:     0.32

 ********************               FIRST ORDER CONDITIONAL ESTIMATION WITH INTERACTION              ********************
 #OBJT:**************                       MINIMUM VALUE OF OBJECTIVE FUNCTION                      ********************
 #OBJV:********************************************      988.226       **************************************************

 ********************               FIRST ORDER CONDITIONAL ESTIMATION WITH INTERACTION              ********************
 ********************                             FINAL PARAMETER ESTIMATE                           ********************

 THETA - VECTOR OF FIXED EFFECTS PARAMETERS   *********
         TH 1      TH 2      TH 3      TH 4      TH 5
         1.08E+00  1.90E+01  1.93E+00  3.39E+01  1.11E+01

 OMEGA - COV MATRIX FOR RANDOM EFFECTS - ETAS  ********
            ETA1      ETA2
 ETA1
+        6.78E-02
 ETA2
+        0.00E+00  6.61E-02

 SIGMA - COV MATRIX FOR RANDOM EFFECTS - EPSILONS  ****
            EPS1      EPS2
 EPS1
+        1.60E-02
 EPS2
+        0.00E+00  1.06E-03

 OMEGA - CORR MATRIX FOR RANDOM EFFECTS - ETAS  *******
            ETA1      ETA2
 ETA1
+        2.60E-01
 ETA2
+        0.00E+00  2.57E-01

 SIGMA - CORR MATRIX FOR RANDOM EFFECTS - EPSILONS  ***
            EPS1      EPS2
 EPS1
+        1.27E-01
 EPS2
+        0.00E+00  3.26E-02

 ********************               FIRST ORDER CONDITIONAL ESTIMATION WITH INTERACTION              ********************
 ********************                            STANDARD ERROR OF ESTIMATE                          ********************

 THETA - VECTOR OF FIXED EFFECTS PARAMETERS   *********
         TH 1      TH 2      TH 3      TH 4      TH 5
         1.11E+00  5.71E-01  3.48E+00  4.48E+03  7.16E+03

 OMEGA - COV MATRIX FOR RANDOM EFFECTS - ETAS  ********
            ETA1      ETA2
 ETA1
+        1.45E-01
 ETA2
+       .........  9.67E-03

 SIGMA - COV MATRIX FOR RANDOM EFFECTS - EPSILONS  ****
            EPS1      EPS2
 EPS1
+        1.29E-03
 EPS2
+       .........  1.18E-04

 OMEGA - CORR MATRIX FOR RANDOM EFFECTS - ETAS  *******
            ETA1      ETA2
 ETA1
+        2.78E-01
 ETA2
+       .........  1.88E-02

 SIGMA - CORR MATRIX FOR RANDOM EFFECTS - EPSILONS  ***
            EPS1      EPS2
 EPS1
+        5.10E-03
 EPS2
+       .........  1.81E-03

 ********************               FIRST ORDER CONDITIONAL ESTIMATION WITH INTERACTION              ********************
 ********************                          COVARIANCE MATRIX OF ESTIMATE                         ********************

            TH 1      TH 2      TH 3      TH 4      TH 5      OM11      OM12      OM22      SG11      SG12      SG22
 TH 1
+        1.23E+00
 TH 2
+        7.95E-02  3.26E-01
 TH 3
+       -3.87E+00 -2.35E-01  1.21E+01
 TH 4
+        4.97E+03  3.00E+02 -1.56E+04  2.01E+07
 TH 5
+        7.94E+03  4.80E+02 -2.49E+04  3.21E+07  5.12E+07
 OM11
+       -1.59E-01 -1.06E-02  5.00E-01 -6.43E+02 -1.03E+03  2.09E-02
 OM12
+       ......... ......... ......... ......... ......... ......... .........
 OM22
+        9.40E-04 -2.02E-03 -2.87E-03  3.67E+00  5.86E+00 -1.04E-04 .........  9.35E-05
 SG11
+        1.17E-05 -3.45E-05  1.73E-06  4.27E-03  6.79E-03 -1.88E-06 ......... -1.22E-06  1.67E-06
 SG12
+       ......... ......... ......... ......... ......... ......... ......... ......... ......... .........
 SG22
+        6.51E-06 -1.16E-05 -2.01E-05  2.56E-02  4.10E-02 -8.40E-07 .........  1.35E-07  9.74E-09 .........  1.39E-08

 ********************               FIRST ORDER CONDITIONAL ESTIMATION WITH INTERACTION              ********************
 ********************                          CORRELATION MATRIX OF ESTIMATE                        ********************

            TH 1      TH 2      TH 3      TH 4      TH 5      OM11      OM12      OM22      SG11      SG12      SG22
 TH 1
+        1.11E+00
 TH 2
+        1.25E-01  5.71E-01
 TH 3
+       -9.99E-01 -1.18E-01  3.48E+00
 TH 4
+        9.98E-01  1.17E-01 -1.00E+00  4.48E+03
 TH 5
+        9.98E-01  1.17E-01 -1.00E+00  1.00E+00  7.16E+03
 OM11
+       -9.92E-01 -1.29E-01  9.93E-01 -9.93E-01 -9.93E-01  1.45E-01
 OM12
+       ......... ......... ......... ......... ......... ......... .........
 OM22
+        8.75E-02 -3.66E-01 -8.51E-02  8.47E-02  8.47E-02 -7.44E-02 .........  9.67E-03
 SG11
+        8.15E-03 -4.68E-02  3.85E-04  7.38E-04  7.34E-04 -1.01E-02 ......... -9.79E-02  1.29E-03
 SG12
+       ......... ......... ......... ......... ......... ......... ......... ......... ......... .........
 SG22
+        4.97E-02 -1.73E-01 -4.90E-02  4.85E-02  4.85E-02 -4.92E-02 .........  1.18E-01  6.39E-02 .........  1.18E-04
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 #CPUT: Total CPU Time in Seconds,        4.572
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