Wed Mar 26 16:31:54 CET 2014
$PROBLEM    PK model
$INPUT      ID TIME DV AMT WT
$DATA       outA.tab IGNORE=@
$SUBROUTINE ADVAN1 TRANS2
$PK

 CL  = THETA(1) * EXP(ETA(1))
 V   = THETA(2) * EXP(ETA(2))
 ;BASCL = THETA(3)
 ;EMAX  = THETA(4)
 ;E50   = THETA(5)
 ;HL    = THETA(6)

 ;CL    = BASCL+TVCL*((EMAX*WT**HL)/(E50**HL+WT**HL))
 ;V     = TVV *(WT/70)

 SC    = V

$ERROR
 IPRED = F
 Y= IPRED*(1+EPS(1))+EPS(2)

;$SIM (1000) ONLYSIM NSUBPROBLEM=1
;$TABLE ID TIME DV AMT FILE=outA.tab NOAPPEND NOPRINT NOHEADER
$THETA  (0,3,100) ; TVCL
 (0,20,100) ; TVV
; (0, 1, 10)            ; BASCL
; (0, 2, 10)            ; EMAX
; (0, 25,  200)         ; E50
; (0, 5, 20)            ; HL
$OMEGA  0.05
 0.05
$SIGMA  0.015
 0.0015
$ESTIMATION METHOD=1 INTER MAXEVAL=9999 SIG=3 PRINT=5 NOABORT POSTHOC
$COVARIANCE UNCONDITIONAL

NM-TRAN MESSAGES
 WARNINGS AND ERRORS (IF ANY) FOR PROBLEM    1
 (WARNING  2) NM-TRAN INFERS THAT THE DATA ARE POPULATION.

1NONLINEAR MIXED EFFECTS MODEL PROGRAM (NONMEM) VERSION 7.3.0
 ORIGINALLY DEVELOPED BY STUART BEAL, LEWIS SHEINER, AND ALISON BOECKMANN
 CURRENT DEVELOPERS ARE ROBERT BAUER, ICON DEVELOPMENT SOLUTIONS,
 AND ALISON BOECKMANN. IMPLEMENTATION, EFFICIENCY, AND STANDARDIZATION
 PERFORMED BY NOUS INFOSYSTEMS.
 PROBLEM NO.:         1
 PK model
 TOT. NO. OF OBS RECS:      350
 TOT. NO. OF INDIVIDUALS:     50
 ONE COMPARTMENT MODEL (ADVAN1)
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 #TBLN:      1
 #METH: First Order Conditional Estimation with Interaction
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
 #TERM:
0MINIMIZATION SUCCESSFUL
 NO. OF FUNCTION EVALUATIONS USED:      123
 NO. OF SIG. DIGITS IN FINAL EST.:  3.0

 ETABAR IS THE ARITHMETIC MEAN OF THE ETA-ESTIMATES,
 AND THE P-VALUE IS GIVEN FOR THE NULL HYPOTHESIS THAT THE TRUE MEAN IS 0.

 ETABAR:        -9.2740E-05 -1.0273E-03
 SE:             1.0691E-02  3.5488E-02
 N:                      50          50

 P VAL.:         9.9308E-01  9.7690E-01

 ETAshrink(%):   1.2280E+01  1.8699E+00
 EBVshrink(%):   1.2848E+01  2.5421E+00
 EPSshrink(%):   1.2603E+01  1.2603E+01

 #TERE:
 Elapsed estimation time in seconds:     0.52
 Elapsed covariance time in seconds:     0.50

 ********************               FIRST ORDER CONDITIONAL ESTIMATION WITH INTERACTION              ********************
 #OBJT:**************                       MINIMUM VALUE OF OBJECTIVE FUNCTION                      ********************
 #OBJV:********************************************     1209.184       **************************************************

 ********************               FIRST ORDER CONDITIONAL ESTIMATION WITH INTERACTION              ********************
 ********************                             FINAL PARAMETER ESTIMATE                           ********************

 THETA - VECTOR OF FIXED EFFECTS PARAMETERS   *********
         TH 1      TH 2
         3.02E+00  1.98E+01

 OMEGA - COV MATRIX FOR RANDOM EFFECTS - ETAS  ********
            ETA1      ETA2
 ETA1
+        7.58E-03
 ETA2
+        0.00E+00  6.67E-02

 SIGMA - COV MATRIX FOR RANDOM EFFECTS - EPSILONS  ****
            EPS1      EPS2
 EPS1
+        1.63E-02
 EPS2
+        0.00E+00  3.09E-03

 OMEGA - CORR MATRIX FOR RANDOM EFFECTS - ETAS  *******
            ETA1      ETA2
 ETA1
+        8.71E-02
 ETA2
+        0.00E+00  2.58E-01

 SIGMA - CORR MATRIX FOR RANDOM EFFECTS - EPSILONS  ***
            EPS1      EPS2
 EPS1
+        1.28E-01
 EPS2
+        0.00E+00  5.55E-02

 ********************               FIRST ORDER CONDITIONAL ESTIMATION WITH INTERACTION              ********************
 ********************                            STANDARD ERROR OF ESTIMATE                          ********************

 THETA - VECTOR OF FIXED EFFECTS PARAMETERS   *********
         TH 1      TH 2
         4.14E-02  7.34E-01

 OMEGA - COV MATRIX FOR RANDOM EFFECTS - ETAS  ********
            ETA1      ETA2
 ETA1
+        1.75E-03
 ETA2
+       .........  1.47E-02

 SIGMA - COV MATRIX FOR RANDOM EFFECTS - EPSILONS  ****
            EPS1      EPS2
 EPS1
+        1.18E-03
 EPS2
+       .........  1.71E-03

 OMEGA - CORR MATRIX FOR RANDOM EFFECTS - ETAS  *******
            ETA1      ETA2
 ETA1
+        1.00E-02
 ETA2
+       .........  2.84E-02

 SIGMA - CORR MATRIX FOR RANDOM EFFECTS - EPSILONS  ***
            EPS1      EPS2
 EPS1
+        4.62E-03
 EPS2
+       .........  1.54E-02

 ********************               FIRST ORDER CONDITIONAL ESTIMATION WITH INTERACTION              ********************
 ********************                          COVARIANCE MATRIX OF ESTIMATE                         ********************

            TH 1      TH 2      OM11      OM12      OM22      SG11      SG12      SG22
 TH 1
+        1.71E-03
 TH 2
+       -3.34E-03  5.38E-01
 OM11
+        1.71E-05  1.60E-04  3.05E-06
 OM12
+       ......... ......... ......... .........
 OM22
+       -8.32E-05  3.33E-03 -1.27E-06 .........  2.16E-04
 SG11
+       -1.13E-05  7.45E-06 -2.45E-07 .........  1.38E-06  1.40E-06
 SG12
+       ......... ......... ......... ......... ......... ......... .........
 SG22
+        9.95E-06  1.23E-04  2.94E-07 ......... -4.12E-06 -3.93E-07 .........  2.91E-06

 ********************               FIRST ORDER CONDITIONAL ESTIMATION WITH INTERACTION              ********************
 ********************                          CORRELATION MATRIX OF ESTIMATE                        ********************

            TH 1      TH 2      OM11      OM12      OM22      SG11      SG12      SG22
 TH 1
+        4.14E-02
 TH 2
+       -1.10E-01  7.34E-01
 OM11
+        2.37E-01  1.25E-01  1.75E-03
 OM12
+       ......... ......... ......... .........
 OM22
+       -1.37E-01  3.09E-01 -4.94E-02 .........  1.47E-02
 SG11
+       -2.32E-01  8.59E-03 -1.18E-01 .........  7.92E-02  1.18E-03
 SG12
+       ......... ......... ......... ......... ......... ......... .........
 SG22
+        1.41E-01  9.86E-02  9.86E-02 ......... -1.64E-01 -1.95E-01 .........  1.71E-03
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 #CPUT: Total CPU Time in Seconds,        1.039
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